OpenVSP model (file version 5), 4 components.
Geometry view with OpenVSP parameter names; values to 6 digits, angles in degrees, lengths in the model's unit.
Overall bounding box: X_Min=0 X_Len=6.5997 Y_Min=-7.0809 Y_Len=14.1618 Z_Min=-0.460686 Z_Len=1.893

Wing "main_wing"
  location (X Y Z) 1.5 0 1, rotation 0 0 0
  symmetric about XZ
  bounding box size 1.7958 14.1618 0.464649
  mass: Density=250 Shell_Flag=0 Mass_Area=1 Mass_Prior=0 PointMass=2100 CGx=0 CGy=0 CGz=0 Ixx=0 Iyy=0 Izz=0 Ixy=0 Ixz=0 Iyz=0
  totals: TotalSpan=14.1717 TotalProjectedSpan=14.11 TotalChord=1.08892 TotalArea=16.1937 TotalAR=12.2944 MAC=1.19398
  root: chord 1.796, twist -1, airfoil file "S1223"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 BaseThickChord=0.119287 DeltaX=5e-05 DeltaY=0.00178 ThickChord=0.119287
  sections:
    n  Span      Root_Chord  Tip_Chord  Area      Sweep  Sweep_Location  Dihedral  Twist  Twist_Location  tip airfoil
    1  1.73906   1.796       1.19254    2.59862   3.18   0.25            0         0      0.25            as above
    2  4.9474    1.19254     0.914      5.21095   0      0.25            3         1      0.25            NACA 4-digit modified Camber=0 CamberLoc=0.2 DeltaX=5e-05 DeltaY=0.00178 IdealCl=0 LERadIndx=6 ThickChord=0.119287 ThickLoc=0.3
    3  0.399414  0.914       0.524432   0.287265  26.45  0.25            20        0      0.25            as above

Wing "horizontal_tail"
  location (X Y Z) 5.3 0 0.27, rotation 0 0 0
  symmetric about XZ
  bounding box size 1.29273 2.58055 1.04398
  mass: Density=168.353 Shell_Flag=0 Mass_Area=1 Mass_Prior=0 PointMass=300 CGx=0 CGy=0 CGz=0 Ixx=0 Iyy=0 Izz=0 Ixy=0 Ixz=0 Iyz=0
  totals: TotalSpan=3.07635 TotalProjectedSpan=2.52 TotalChord=0.8097 TotalArea=2.49092 TotalAR=2.54942 MAC=0.815775
  root: chord 0.9494, twist -10, NACA 4-series Camber=0 CamberLoc=0.2 ThickChord=0.12
  sections:
    n  Span     Root_Chord  Tip_Chord  Area     Sweep  Sweep_Location  Dihedral  Twist  Twist_Location  tip airfoil
    1  1.53818  0.9494      0.67       1.24546  20     0.25            35        0      0.25            NACA 4-series Camber=0 CamberLoc=0.2 ThickChord=0.119287

Fuselage "fuselage"
  location (X Y Z) 0 0 0, rotation 0 0 0
  bounding box size 6.46 1.28131 1.62406
  mass: Density=168.007 Shell_Flag=0 Mass_Area=1 Mass_Prior=0 PointMass=1000.43 CGx=0 CGy=0 CGz=0.3 Ixx=0 Iyy=0 Izz=0 Ixy=0 Ixz=0 Iyz=0
  Design: Length=6.46
  cross sections:
    n  XLocPercent  YLocPercent  ZLocPercent  shape
    0  0            0            0            point
    1  0.026        0            0.00849      ellipse Ellipse_Height=0.481 Ellipse_Width=0.553
    2  0.074        0            0.02874      ellipse Ellipse_Height=1 Ellipse_Width=0.912
    3  0.161        0            0.04348      ellipse Ellipse_Height=1.41 Ellipse_Width=1.174
    4  0.284        0            0.05435      ellipse Ellipse_Height=1.62 Ellipse_Width=1.276
    5  0.531        0            0.04669      ellipse Ellipse_Height=1.409 Ellipse_Width=1.121
    6  0.651        0            0.03875      ellipse Ellipse_Height=1.11 Ellipse_Width=0.833
    7  0.773        0            0.03612      ellipse Ellipse_Height=0.78 Ellipse_Width=0.512
    8  1            0            0.03234      ellipse Ellipse_Height=0.195 Ellipse_Width=0.13
    9  1            0            0.03234      point

Mesh "MeshGeom"
  location (X Y Z) 0 0 0, rotation 0 0 0

VSPAERO settings (reference component "main_wing"): Sref=16.1937 bref=14.1717 cref=1.19398 Xcg=1.78519 Ycg=-2.9137e-08 Zcg=0.754251 AlphaStart=0 AlphaEnd=15 AlphaNpts=1 BetaStart=0 BetaEnd=10 BetaNpts=11 MachStart=0.15 MachEnd=0 MachNpts=1 ReCref=3.87e+06 Vinf=51 Rho=0.002377
